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/batch
! ANSYS input file written by Workbench version 2025 R2
! File used for geometry attach: C:\Users\stolf\dev\Esercitazioni Sensori, Rivelatori e Dispositivi Elettronici\esercitazione_b\esercizio_1\simulazioneTrasduttorePiezoUltrasonicoCoppiaCeramiche_files\dp0\global\MECH\SYS-3\AssembledModel\SYS-3.pmdb
/title,simulazioneTrasduttoreUltrasonico--Modal (C3)
/COM,/COM,     LSDYNA, 2025.2
/COM,/COM,     ANSYSMotion, 2025.2
/com,--- Data in consistent MKS units. See Solving Units in the help system for more information.
/units,MKS
/prep7
! Turn off shape checking because checks already performed inside WB mesher.
! See help system for more information.
SHPP,OFF,,NOWARN
etcon,set             ! allow ANSYS to choose best KEYOP's for 180x elements, resets any applicable keyopt to MAPDL defaults
/com,*********** Send User Defined Coordinate System(s) ***********
local,12,0,0.,0.,0.,0.,0.,0.
csys,0
/com,*********** Nodes for the whole assembly ***********
nblock,3,,20442
(1i9,3e20.9e3)
        1     3.799207254E-03     1.829914326E-03     3.680000000E-02
        2     3.628514877E-03     3.641255783E-03     3.680000000E-02
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-1
/com,*********** Elements for Body 1 'M1(Mechanical Model)' ***********
et,1,186
keyo,1,2,1          ! set full integration on SOLID186
MAT,1 $ TYPE,1 $ REAL,1 $ SECNUM,1 $ ESYS,12
eblock,11,COMPACT,,1728
(11i9)
        1     1676     2124     2117     1674     1704     2147     2140     1702     8071     8070
     8046     6755     2163     8133     8116     2195     6829     8132     8112     6826
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-1
secnum,1    ! reset the section ID to default
/com,*********** Elements for Body 2 'M2(Mechanical Model)' ***********
et,2,186
keyo,2,2,1          ! set full integration on SOLID186
MAT,2 $ TYPE,2 $ REAL,2 $ SECNUM,2 $ ESYS,12
eblock,11,COMPACT,,1728
(11i9)
     1729     8738    10257    10250     8736     8772    10280    10273     8770    16204    16203
    16179    11948    10359    16266    16249    10367    12029    16265    16245    12026
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-1
secnum,1    ! reset the section ID to default
/com,*********** Elements for Body 3 'C1(Mechanical Model)' ***********
et,3,186
keyo,3,2,1          ! set full integration on SOLID186
MAT,3 $ TYPE,3 $ REAL,3 $ SECNUM,3 $ ESYS,12
eblock,11,COMPACT,,178
(11i9)
     3457    16532    16530    16641    16644    16531    16529    16642    16646    16749    17601
    17537    16730    17294    17602    17539    16680    17295    17291    17532    17538
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-1
secnum,1    ! reset the section ID to default
/com,*********** Elements for Body 4 'C2(Mechanical Model)' ***********
et,4,186
keyo,4,2,1          ! set full integration on SOLID186
MAT,4 $ TYPE,4 $ REAL,4 $ SECNUM,4 $ ESYS,12
eblock,11,COMPACT,,128
(11i9)
     3635    17894    17895    17786    17787    17608    17609    17643    17642    18566    18583
    18340    18584    17964    18012    18014    18017    18570    18569    18383    18381
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-1
secnum,1    ! reset the section ID to default
toffst,273.15,      ! Temperature offset from absolute zero
/com,*********** Set Reference Temperature ***********
tref,22.
/com,*********** Send Materials ***********
MP,DENS,1,4480,	! kg m^-3
MP,EX,1,166700000000,	! Pa
MP,NUXY,1,0.32,

MP,DENS,2,4480,	! kg m^-3
MP,EX,2,166700000000,	! Pa
MP,NUXY,2,0.32,

MP,DENS,3,7700,	! kg m^-3

TB,ELASTIC,3,,,AELS

TBDATA,1,168000000000,110000000000,99900000000,0,0,0
TBDATA,7,168000000000,99900000000,0,0,0,123000000000
TBDATA,13,0,0,0,29000000000,0,0
TBDATA,19,30100000000,0,30100000000

MP,DENS,4,7700,	! kg m^-3

TB,ELASTIC,4,,,AELS

TBDATA,1,168000000000,110000000000,99900000000,0,0,0
TBDATA,7,168000000000,99900000000,0,0,0,123000000000
TBDATA,13,0,0,0,29000000000,0,0
TBDATA,19,30100000000,0,30100000000

!************************* Model Summary ********************
!M1(Mechanical Model),	Titanio,	matid,	1
!M2(Mechanical Model),	Titanio,	matid,	2
!C1(Mechanical Model),	PZ26,	matid,	3
!C2(Mechanical Model),	PZ26,	matid,	4
!************************* End Model Summary ********************
/com,*********** Create Contact "Contact Region(Mechanical Model)" ***********
*set,tid,6
*set,cid,5
r,tid
r,cid
et,tid,170
et,cid,177
tshape,para
MAT,5 $ TYPE,5 $ REAL,5 $ SECNUM,5 $ ESYS,0
eblock,11,COMPACT,,32
(11i9)
     5981     1220     1755     2220
     5982     1755     1753     2219
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-1
secnum,1    ! reset the section ID to default
MAT,6 $ TYPE,6 $ REAL,5 $ SECNUM,6 $ ESYS,0
eblock,11,COMPACT,,38
(11i9)
     6013    16275    16276    16698
     6014    16276    16279    16697
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-1
secnum,1    ! reset the section ID to default
tshape
esel,s,type,,cid
esel,r,real,,cid
*get,_elow,elem,0,num,min
enorm,_elow,,,,,NOWARN       ! enorm in case the edges are not aligned. don't issues warnings
esel,s,type,,tid
esel,r,real,,cid
*get,_elow,elem,0,num,min
enorm,_elow,,,,,NOWARN       ! enorm in case the edges are not aligned. don't issues warnings
keyo,cid,3,2               ! beam-beam or line segments edge contact, include all possible contact
keyo,cid,10,0              ! adjust contact stiffness each NR iteration (from Program Controlled setting)
keyo,cid,12,5              ! bonded always
keyo,cid,18,1              ! small sliding turned on by application
keyo,cid,2,2               ! MPC for bonded contacts (from Program Controlled setting)
keyo,tid,5,4               ! Force Distributed Constraint, All Directions
keyo,cid,9,1               ! ignore initial gaps/penetration
keyo,cid,7,0               ! No Prediction
rmod,cid,3,10.      ! FKN
rmod,cid,5,0.       ! ICONT
rmod,cid,6,0.       ! PINB
rmod,cid,10,0.      ! CNOF
rmod,cid,12,0.      ! FKT
rmod,cid,36,106     ! WB DSID
/com,*********** Create Contact "Contact Region 2(Mechanical Model)" ***********
*set,tid,8
*set,cid,7
r,tid
r,cid
et,tid,170
et,cid,177
tshape,para
MAT,7 $ TYPE,7 $ REAL,7 $ SECNUM,7 $ ESYS,0
eblock,11,COMPACT,,32
(11i9)
     6051     9366     9364    10320
     6052     9364     9362    10321
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-1
secnum,1    ! reset the section ID to default
MAT,8 $ TYPE,8 $ REAL,7 $ SECNUM,8 $ ESYS,0
eblock,11,COMPACT,,32
(11i9)
     6083    17606    17610    17896
     6084    17610    17614    17897
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-1
secnum,1    ! reset the section ID to default
tshape
esel,s,type,,cid
esel,r,real,,cid
*get,_elow,elem,0,num,min
enorm,_elow,,,,,NOWARN       ! enorm in case the edges are not aligned. don't issues warnings
esel,s,type,,tid
esel,r,real,,cid
*get,_elow,elem,0,num,min
enorm,_elow,,,,,NOWARN       ! enorm in case the edges are not aligned. don't issues warnings
keyo,cid,3,2               ! beam-beam or line segments edge contact, include all possible contact
keyo,cid,10,0              ! adjust contact stiffness each NR iteration (from Program Controlled setting)
keyo,cid,12,5              ! bonded always
keyo,cid,18,1              ! small sliding turned on by application
keyo,cid,2,2               ! MPC for bonded contacts (from Program Controlled setting)
keyo,tid,5,4               ! Force Distributed Constraint, All Directions
keyo,cid,9,1               ! ignore initial gaps/penetration
keyo,cid,7,0               ! No Prediction
rmod,cid,3,10.      ! FKN
rmod,cid,5,0.       ! ICONT
rmod,cid,6,0.       ! PINB
rmod,cid,10,0.      ! CNOF
rmod,cid,12,0.      ! FKT
rmod,cid,36,107     ! WB DSID
/com,*********** Create Contact "Contact Region 3(Mechanical Model)" ***********
*set,tid,10
*set,cid,9
r,tid
r,cid
et,tid,170
et,cid,177
tshape,para
MAT,9 $ TYPE,9 $ REAL,9 $ SECNUM,9 $ ESYS,0
eblock,11,COMPACT,,38
(11i9)
     6115    16277    16278    16748
     6116    16278    16281    16747
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-1
secnum,1    ! reset the section ID to default
MAT,10 $ TYPE,10 $ REAL,9 $ SECNUM,10 $ ESYS,0
eblock,11,COMPACT,,32
(11i9)
     6153    17607    17611    17904
     6154    17611    17615    17905
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-1
secnum,1    ! reset the section ID to default
tshape
esel,s,type,,cid
esel,r,real,,cid
*get,_elow,elem,0,num,min
enorm,_elow,,,,,NOWARN       ! enorm in case the edges are not aligned. don't issues warnings
esel,s,type,,tid
esel,r,real,,cid
*get,_elow,elem,0,num,min
enorm,_elow,,,,,NOWARN       ! enorm in case the edges are not aligned. don't issues warnings
keyo,cid,3,2               ! beam-beam or line segments edge contact, include all possible contact
keyo,cid,10,0              ! adjust contact stiffness each NR iteration (from Program Controlled setting)
keyo,cid,12,5              ! bonded always
keyo,cid,18,1              ! small sliding turned on by application
keyo,cid,2,2               ! MPC for bonded contacts (from Program Controlled setting)
keyo,tid,5,4               ! Force Distributed Constraint, All Directions
keyo,cid,9,1               ! ignore initial gaps/penetration
keyo,cid,7,0               ! No Prediction
rmod,cid,3,10.      ! FKN
rmod,cid,5,0.       ! ICONT
rmod,cid,6,0.       ! PINB
rmod,cid,10,0.      ! CNOF
rmod,cid,12,0.      ! FKT
rmod,cid,36,108     ! WB DSID
nsel,all
esel,all
/com,*********** Send Named Selection as Node Component ***********
CMBLOCK,RIGHT_EXTREMITY_MECHANICAL_MODEL,NODE,      153
(8i10)
      8746     -8779      9284     -9311      9816     -9843     10258    -10280
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fini
/solu
antype,2                   ! modal analysis
_thickRatio=  1     ! Ratio of thick parts in the model
thexpand,off     ! ignore thermal strains
modopt,lanb,all,15000.,72000.
outres,erase
outres,all,none
outres,nsol,all
outres,strs,all,
outres,epel,all,
outres,eppl,all,
outres,rsol,all
nsel,s,d,U
nsel,a,d,ROT
esln
cm,_ConstrainedNodes,elem  ! -- reduced set with only constrained nodes
nsel,all
esel,all
outres,nload,all,_ConstrainedNodes  !-- reduced set with only constrained nodes
mxpand,,,,yes,,no             ! expand requested element results, but not write them to file.mode
dmpopt,esav,no
dmpopt,emat,no
dmpopt,full,no


! *********** WB SOLVE COMMAND ***********
! check interactive state
*get,ANSINTER_,active,,int
*if,ANSINTER_,ne,0,then
/eof
*endif
solve
/com *************** Write FE CONNECTORS *********
CEWRITE,file,ce,,INTE
*get,_nmodalsolproc,active,0,numcpu
fini
save,file,db
*get,_NSOLTHREADS,active,0,ntfs
*get,_NSOLPROCESSES,active,0,npfs
/post1
*dim,_direction,CHAR,6,1
_direction(1) = 'X'
_direction(2) = 'Y'
_direction(3) = 'Z'
_direction(4) = 'ROTX'
_direction(5) = 'ROTY'
_direction(6) = 'ROTZ'
*get,_lastLS,active,0,set,LSTP
*get,_beginset,active,0,set,nset,first,_lastLS
*get,_endset,active,0,set,nset,last,_lastLS
_nummodes = 0
*if,_endset,gt,0,then
_nummodes = _endset - _beginset + 1
*endif
*do,i_mode,1,_nummodes
   *do,j_component,1,6
			*get,PFACT_%i_mode%_%j_component%,MODE,%i_mode%,PFACT,,DIREC,_direction(%j_component%)
   *enddo
*enddo
*dim,_tmdirection,CHAR,6,1
_tmdirection(1) = 'X'
_tmdirection(2) = 'Y'
_tmdirection(3) = 'Z'
_tmdirection(4) = 'X'
_tmdirection(5) = 'Y'
_tmdirection(6) = 'Z'
*do,j_component,1,6
    *if,j_component,gt,3,then
        *get,TOTALMASS_%j_component%,ELEM,0,IOR,_tmdirection(%j_component%)
    *else
        *get,TOTALMASS_%j_component%,ELEM,0,MTOT,_tmdirection(%j_component%)
    *endif
*enddo
fini
