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/batch
! ANSYS input file written by Workbench version 2025 R2
! File used for geometry attach: C:\Users\stolf\dev\EsercitazioniSensori\esercitazione_b\esercizio_2\simulazioneTrasduttoreUltrasonicoConConcentratore_files\dp0\global\MECH\SYS-4\AssembledModel\SYS-4.pmdb
/title,simulazioneTrasduttoreUltrasonicoConConcentratore--Harmonic Response (E3)
/COM,/COM,     LSDYNA, 2025.2
/COM,/COM,     ANSYSMotion, 2025.2
/com,--- Data in consistent MKS units. See Solving Units in the help system for more information.
/units,MKS
/prep7
! Turn off shape checking because checks already performed inside WB mesher.
! See help system for more information.
SHPP,OFF,,NOWARN
etcon,set             ! allow ANSYS to choose best KEYOP's for 180x elements, resets any applicable keyopt to MAPDL defaults
/com,*********** Send User Defined Coordinate System(s) ***********
local,12,0,0.,0.,0.,0.,0.,0.
csys,0
/com,*********** Nodes for the whole assembly ***********
nblock,3,,33942
(1i9,3e20.9e3)
        1     3.815048869E-03     1.823627070E-03     3.680000000E-02
        2     3.634399456E-03     3.633573708E-03     3.680000000E-02
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-1
/com,*********** Elements for Body 1 'M1(Transducer Mechanical Model)' ***********
et,1,186
keyo,1,2,1          ! set full integration on SOLID186
MAT,1 $ TYPE,1 $ REAL,1 $ SECNUM,1 $ ESYS,12
eblock,11,COMPACT,,1728
(11i9)
        1     1676     2124     2117     1674     1704     2147     2140     1702     8071     8070
     8046     6755     2163     8133     8116     2195     6829     8132     8112     6826
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-1
secnum,1    ! reset the section ID to default
/com,*********** Elements for Body 2 'M2(Transducer Mechanical Model)' ***********
et,2,186
keyo,2,2,1          ! set full integration on SOLID186
MAT,2 $ TYPE,2 $ REAL,2 $ SECNUM,2 $ ESYS,12
eblock,11,COMPACT,,1692
(11i9)
     1729     8702    10219    10212     8700     8734    10242    10235     8732    16054    16053
    16029    11804    10321    16116    16099    10329    11879    16115    16095    11876
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-1
secnum,1    ! reset the section ID to default
/com,*********** Elements for Body 3 'C1(Transducer Mechanical Model)' ***********
et,3,186
keyo,3,2,1          ! set full integration on SOLID186
MAT,3 $ TYPE,3 $ REAL,3 $ SECNUM,3 $ ESYS,12
eblock,11,COMPACT,,111
(11i9)
     3421    16282    16280    16347    16284    16281    16279    16348    16283    16413    16985
    16963    16462    16771    16986    16964    16777    16772    16768    16907    16778
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-1
secnum,1    ! reset the section ID to default
/com,*********** Elements for Body 4 'C2(Transducer Mechanical Model)' ***********
et,4,186
keyo,4,2,1          ! set full integration on SOLID186
MAT,4 $ TYPE,4 $ REAL,4 $ SECNUM,4 $ ESYS,12
eblock,11,COMPACT,,128
(11i9)
     3532    17275    17276    17167    17168    16989    16990    17024    17023    17947    17964
    17721    17965    17345    17393    17395    17398    17951    17950    17764    17762
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-1
secnum,1    ! reset the section ID to default
/com,*********** Elements for Body 5 'M4(Transducer Mechanical Model)' ***********
et,5,186
keyo,5,2,1          ! set full integration on SOLID186
MAT,5 $ TYPE,5 $ REAL,5 $ SECNUM,5 $ ESYS,12
eblock,11,COMPACT,,972
(11i9)
     3660    18992    18991    19223    19222    19008    19007    19235    19234    21996    22692
    22673    22693    19245    22724    22709    19249    22037    22036    22710    22708
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-1
secnum,1    ! reset the section ID to default
/com,*********** Elements for Body 6 'M3(Transducer Mechanical Model)' ***********
et,6,186
keyo,6,2,1          ! set full integration on SOLID186
MAT,6 $ TYPE,6 $ REAL,6 $ SECNUM,6 $ ESYS,12
eblock,11,COMPACT,,1728
(11i9)
     4632    23329    24848    24841    23327    23363    24871    24864    23361    30795    30794
    30770    26539    24879    30857    30840    24919    26620    30856    30836    26617
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-1
secnum,1    ! reset the section ID to default
toffst,273.15,      ! Temperature offset from absolute zero
/com,*********** Set Reference Temperature ***********
tref,22.
/com,*********** Send Materials ***********
MP,DENS,1,4480,	! kg m^-3
MP,EX,1,166700000000,	! Pa
MP,NUXY,1,0.32,

MP,DENS,2,4480,	! kg m^-3
MP,EX,2,166700000000,	! Pa
MP,NUXY,2,0.32,

MP,DENS,3,7700,	! kg m^-3

TB,ELASTIC,3,,,AELS

TBDATA,1,168000000000,110000000000,99900000000,0,0,0
TBDATA,7,168000000000,99900000000,0,0,0,123000000000
TBDATA,13,0,0,0,29000000000,0,0
TBDATA,19,30100000000,0,30100000000

MP,DENS,4,7700,	! kg m^-3

TB,ELASTIC,4,,,AELS

TBDATA,1,168000000000,110000000000,99900000000,0,0,0
TBDATA,7,168000000000,99900000000,0,0,0,123000000000
TBDATA,13,0,0,0,29000000000,0,0
TBDATA,19,30100000000,0,30100000000

MP,DENS,5,4480,	! kg m^-3
MP,EX,5,166700000000,	! Pa
MP,NUXY,5,0.32,

MP,DENS,6,4480,	! kg m^-3
MP,EX,6,166700000000,	! Pa
MP,NUXY,6,0.32,

!************************* Model Summary ********************
!M1(Transducer Mechanical Model),	Titanio,	matid,	1
!M2(Transducer Mechanical Model),	Titanio,	matid,	2
!C1(Transducer Mechanical Model),	PZ26,	matid,	3
!C2(Transducer Mechanical Model),	PZ26,	matid,	4
!M4(Transducer Mechanical Model),	Titanio,	matid,	5
!M3(Transducer Mechanical Model),	Titanio,	matid,	6
!************************* End Model Summary ********************
/com,*********** Create Contact "Bonded - M1 To C1(Transducer Mechanical Model)" ***********
*set,tid,8
*set,cid,7
r,tid
r,cid
et,tid,170
et,cid,174
MAT,8 $ TYPE,8 $ REAL,8 $ SECNUM,8 $ ESYS,0
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MAT,7 $ TYPE,7 $ REAL,7 $ SECNUM,7 $ ESYS,0
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MAT,7 $ TYPE,7 $ REAL,8 $ SECNUM,7 $ ESYS,0
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MAT,8 $ TYPE,8 $ REAL,7 $ SECNUM,8 $ ESYS,0
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keyo,cid,8,2               ! auto create asymmetric contact (from Program Controlled setting)
keyo,cid,10,0              ! adjust contact stiffness each NR iteration (from Program Controlled setting)
keyo,cid,12,5              ! bonded always
keyo,cid,18,1              ! small sliding turned on by application
keyo,cid,2,2               ! MPC for bonded contacts (from Program Controlled setting)
keyo,tid,5,0               ! Automatic constraint type detection
keyo,cid,4,2               ! on nodal point - normal to target surface (from Program Controlled setting)
keyo,cid,9,1               ! ignore initial gaps/penetration
keyo,cid,7,0               ! No Prediction
rmod,tid,3,10.      ! FKN
rmod,tid,5,0.       ! ICONT
rmod,tid,6,0.       ! PINB
rmod,tid,10,0.      ! CNOF
rmod,tid,12,0.      ! FKT
rmod,tid,36,91      ! WB DSID
rmod,cid,3,10.      ! FKN
rmod,cid,5,0.       ! ICONT
rmod,cid,6,0.       ! PINB
rmod,cid,10,0.      ! CNOF
rmod,cid,12,0.      ! FKT
rmod,cid,36,91      ! WB DSID
/com,*********** Create Contact "Bonded - C2 To M2(Transducer Mechanical Model)" ***********
*set,tid,10
*set,cid,9
r,tid
r,cid
et,tid,170
et,cid,174
MAT,10 $ TYPE,10 $ REAL,10 $ SECNUM,10 $ ESYS,0
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MAT,9 $ TYPE,9 $ REAL,9 $ SECNUM,9 $ ESYS,0
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MAT,9 $ TYPE,9 $ REAL,10 $ SECNUM,9 $ ESYS,0
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MAT,10 $ TYPE,10 $ REAL,9 $ SECNUM,10 $ ESYS,0
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keyo,cid,8,2               ! auto create asymmetric contact (from Program Controlled setting)
keyo,cid,10,0              ! adjust contact stiffness each NR iteration (from Program Controlled setting)
keyo,cid,12,5              ! bonded always
keyo,cid,18,1              ! small sliding turned on by application
keyo,cid,2,2               ! MPC for bonded contacts (from Program Controlled setting)
keyo,tid,5,0               ! Automatic constraint type detection
keyo,cid,4,2               ! on nodal point - normal to target surface (from Program Controlled setting)
keyo,cid,9,1               ! ignore initial gaps/penetration
keyo,cid,7,0               ! No Prediction
rmod,tid,3,10.      ! FKN
rmod,tid,5,0.       ! ICONT
rmod,tid,6,0.       ! PINB
rmod,tid,10,0.      ! CNOF
rmod,tid,12,0.      ! FKT
rmod,tid,36,92      ! WB DSID
rmod,cid,3,10.      ! FKN
rmod,cid,5,0.       ! ICONT
rmod,cid,6,0.       ! PINB
rmod,cid,10,0.      ! CNOF
rmod,cid,12,0.      ! FKT
rmod,cid,36,92      ! WB DSID
/com,*********** Create Contact "Bonded - C1 To C2(Transducer Mechanical Model)" ***********
*set,tid,12
*set,cid,11
r,tid
r,cid
et,tid,170
et,cid,174
MAT,12 $ TYPE,12 $ REAL,12 $ SECNUM,12 $ ESYS,0
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MAT,11 $ TYPE,11 $ REAL,11 $ SECNUM,11 $ ESYS,0
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MAT,11 $ TYPE,11 $ REAL,12 $ SECNUM,11 $ ESYS,0
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MAT,12 $ TYPE,12 $ REAL,11 $ SECNUM,12 $ ESYS,0
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keyo,cid,8,2               ! auto create asymmetric contact (from Program Controlled setting)
keyo,cid,10,0              ! adjust contact stiffness each NR iteration (from Program Controlled setting)
keyo,cid,12,5              ! bonded always
keyo,cid,18,1              ! small sliding turned on by application
keyo,cid,2,2               ! MPC for bonded contacts (from Program Controlled setting)
keyo,tid,5,0               ! Automatic constraint type detection
keyo,cid,4,2               ! on nodal point - normal to target surface (from Program Controlled setting)
keyo,cid,9,1               ! ignore initial gaps/penetration
keyo,cid,7,0               ! No Prediction
rmod,tid,3,10.      ! FKN
rmod,tid,5,0.       ! ICONT
rmod,tid,6,0.       ! PINB
rmod,tid,10,0.      ! CNOF
rmod,tid,12,0.      ! FKT
rmod,tid,36,93      ! WB DSID
rmod,cid,3,10.      ! FKN
rmod,cid,5,0.       ! ICONT
rmod,cid,6,0.       ! PINB
rmod,cid,10,0.      ! CNOF
rmod,cid,12,0.      ! FKT
rmod,cid,36,93      ! WB DSID
/com,*********** Create Contact "Bonded - M2 To M3(Transducer Mechanical Model)" ***********
*set,tid,14
*set,cid,13
r,tid
r,cid
et,tid,170
et,cid,174
MAT,14 $ TYPE,14 $ REAL,14 $ SECNUM,14 $ ESYS,0
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MAT,13 $ TYPE,13 $ REAL,13 $ SECNUM,13 $ ESYS,0
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MAT,13 $ TYPE,13 $ REAL,14 $ SECNUM,13 $ ESYS,0
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MAT,14 $ TYPE,14 $ REAL,13 $ SECNUM,14 $ ESYS,0
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keyo,cid,8,2               ! auto create asymmetric contact (from Program Controlled setting)
keyo,cid,10,0              ! adjust contact stiffness each NR iteration (from Program Controlled setting)
keyo,cid,12,5              ! bonded always
keyo,cid,18,1              ! small sliding turned on by application
keyo,cid,2,2               ! MPC for bonded contacts (from Program Controlled setting)
keyo,tid,5,0               ! Automatic constraint type detection
keyo,cid,4,2               ! on nodal point - normal to target surface (from Program Controlled setting)
keyo,cid,9,1               ! ignore initial gaps/penetration
keyo,cid,7,0               ! No Prediction
rmod,tid,3,10.      ! FKN
rmod,tid,5,0.       ! ICONT
rmod,tid,6,0.       ! PINB
rmod,tid,10,0.      ! CNOF
rmod,tid,12,0.      ! FKT
rmod,tid,36,204     ! WB DSID
rmod,cid,3,10.      ! FKN
rmod,cid,5,0.       ! ICONT
rmod,cid,6,0.       ! PINB
rmod,cid,10,0.      ! CNOF
rmod,cid,12,0.      ! FKT
rmod,cid,36,204     ! WB DSID
/com,*********** Create Contact "Bonded - M3 To M4(Transducer Mechanical Model)" ***********
*set,tid,16
*set,cid,15
r,tid
r,cid
et,tid,170
et,cid,174
MAT,16 $ TYPE,16 $ REAL,16 $ SECNUM,16 $ ESYS,0
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MAT,15 $ TYPE,15 $ REAL,15 $ SECNUM,15 $ ESYS,0
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MAT,15 $ TYPE,15 $ REAL,16 $ SECNUM,15 $ ESYS,0
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MAT,16 $ TYPE,16 $ REAL,15 $ SECNUM,16 $ ESYS,0
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keyo,cid,8,2               ! auto create asymmetric contact (from Program Controlled setting)
keyo,cid,10,0              ! adjust contact stiffness each NR iteration (from Program Controlled setting)
keyo,cid,12,5              ! bonded always
keyo,cid,18,1              ! small sliding turned on by application
keyo,cid,2,2               ! MPC for bonded contacts (from Program Controlled setting)
keyo,tid,5,0               ! Automatic constraint type detection
keyo,cid,4,2               ! on nodal point - normal to target surface (from Program Controlled setting)
keyo,cid,9,1               ! ignore initial gaps/penetration
keyo,cid,7,0               ! No Prediction
rmod,tid,3,10.      ! FKN
rmod,tid,5,0.       ! ICONT
rmod,tid,6,0.       ! PINB
rmod,tid,10,0.      ! CNOF
rmod,tid,12,0.      ! FKT
rmod,tid,36,205     ! WB DSID
rmod,cid,3,10.      ! FKN
rmod,cid,5,0.       ! ICONT
rmod,cid,6,0.       ! PINB
rmod,cid,10,0.      ! CNOF
rmod,cid,12,0.      ! FKT
rmod,cid,36,205     ! WB DSID
nsel,all
esel,all
/com,*********** Send Named Selection as Node Component ***********
CMBLOCK,RIGHT_EXTREMITY_TRANSDUCER_MECHA,NODE,       79
(8i10)
     18380    -18402     18691    -18706     18995    -19010     19227    -19278
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/com,*********** Send Named Selection as Node Component ***********
CMBLOCK,PZT_CONNECTION,NODE,      306
(8i10)
     16121    -16124     16127     16128     16131     16132     16135     16136
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fini
/solu
antype,harm
hropt,full
thexpand,off     ! ignore thermal strains
kbc,1
*DIM,_harmUserForcingFreqSteps,,1
_harmUserForcingFreqSteps(1) = 48263
harfrq,15000,72000,,,%_harmUserForcingFreqSteps%
nsub,570
outres,erase
outres,all,none
outres,nsol,all
outres,eangl,all
outres,etmp,all
outres,veng,all
outres,strs,all,
outres,epel,all,
outres,rsol,all
outres,cont,all,
outres,nload,all,
/com,***********  Piezoelectric Properties C11 ***********
CMBLOCK,Piezoelectric Body1,NODE,      870
(8i10)
     16384     16385     16386     16387     16388     16389     16390     16391
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
/PREP7
CMSEL,S,Piezoelectric Body1
ESLN,S,1
ESEL,R,ENAME,,185
*GET,iNum185,ELEM,0, COUNT
*IF, iNum185,GT,0,THEN
_icurrentElem = 0
*DO,ar30,1,iNum185,1
    _icurrentElem = ELNEXT(_icurrentElem)
    EMODIF,_icurrentElem,ESYS,0
	*GET, _icurrentETyp, ELEM, _icurrentElem, ATTR, TYPE
    ET,_icurrentETyp,226,1001
	*GET, _icurrentMat, ELEM, _icurrentElem, ATTR, MAT
	MPDELE,RSVX, _icurrentMat
	MPDELE,RSVY, _icurrentMat
	MPDELE,RSVZ, _icurrentMat
	TB,PIEZ,_icurrentMat,,,0
	TBDATA,  3, -2.8
	TBDATA,  6, -2.8
	TBDATA,  9, 14.7
	TBDATA, 14, 9.86
	TBDATA, 16, 9.86

	TB,DPER,_icurrentMat,,,0
	TBDATA, 1, 828.3, 828.3, 699.67

*ENDDO
*ENDIF

CMSEL,S,Piezoelectric Body1
ESLN,S,1
ESEL,R,ENAME,,186
*GET,iNum186,ELEM,0, COUNT
*IF, iNum186,GT,0,THEN
_icurrentElem = 0
*DO,ar30,1,iNum186,1
    _icurrentElem = ELNEXT(_icurrentElem)
    EMODIF,_icurrentElem,ESYS,0
	*GET, _icurrentETyp, ELEM, _icurrentElem, ATTR, TYPE
    ET,_icurrentETyp,226,1001
	*GET, _icurrentMat, ELEM, _icurrentElem, ATTR, MAT
	MPDELE,RSVX, _icurrentMat
	MPDELE,RSVY, _icurrentMat
	MPDELE,RSVZ, _icurrentMat
	TB,PIEZ,_icurrentMat,,,0
	TBDATA,  3, -2.8
	TBDATA,  6, -2.8
	TBDATA,  9, 14.7
	TBDATA, 14, 9.86
	TBDATA, 16, 9.86

	TB,DPER,_icurrentMat,,,0
	TBDATA, 1, 828.3, 828.3, 699.67

*ENDDO
*ENDIF

CMSEL,S,Piezoelectric Body1
ESLN,S,1
ESEL,R,ENAME,,187
*GET,iNum187,ELEM,0, COUNT
*IF, iNum187,GT,0,THEN
_icurrentElem = 0
*DO,ar30,1,iNum187,1
    _icurrentElem = ELNEXT(_icurrentElem)
    EMODIF,_icurrentElem,ESYS,0
	*GET, _icurrentETyp, ELEM, _icurrentElem, ATTR, TYPE
    ET,_icurrentETyp,227,1001
	*GET, _icurrentMat, ELEM, _icurrentElem, ATTR, MAT
	MPDELE,RSVX, _icurrentMat
	MPDELE,RSVY, _icurrentMat
	MPDELE,RSVZ, _icurrentMat
	TB,PIEZ,_icurrentMat,,,0
	TBDATA,  3, -2.8
	TBDATA,  6, -2.8
	TBDATA,  9, 14.7
	TBDATA, 14, 9.86
	TBDATA, 16, 9.86

	TB,DPER,_icurrentMat,,,0
	TBDATA, 1, 828.3, 828.3, 699.67

*ENDDO
*ENDIF

CMSEL,S,Piezoelectric Body1
ESLN,S,1
ESEL,R,ENAME,,182
*GET,iNum182,ELEM,0, COUNT
*IF, iNum182,GT,0,THEN
_icurrentElem = 0
*DO,ar30,1,iNum182,1
    _icurrentElem = ELNEXT(_icurrentElem)
    EMODIF,_icurrentElem,ESYS,0
	*GET, _icurrentETyp, ELEM, _icurrentElem, ATTR, TYPE
	*GET, _planebehavior, ETYP, _icurrentETyp, ATTR, KOP3
	*IF, _planebehavior, EQ, 3, THEN
	    _planebehavior = 0
	*ENDIF
    ET,_icurrentETyp,223,1001,,_planebehavior
	*GET, _icurrentMat, ELEM, _icurrentElem, ATTR, MAT
	MPDELE,RSVX, _icurrentMat
	MPDELE,RSVY, _icurrentMat
	MPDELE,RSVZ, _icurrentMat
	TB,PIEZ,_icurrentMat,,,0

	TB,DPER,_icurrentMat,,,0

*ENDDO
*ENDIF

CMSEL,S,Piezoelectric Body1
ESLN,S,1
ESEL,R,ENAME,,183
*GET,iNum183,ELEM,0, COUNT
*IF, iNum183,GT,0,THEN
_icurrentElem = 0
*DO,ar30,1,iNum183,1
    _icurrentElem = ELNEXT(_icurrentElem)
    EMODIF,_icurrentElem,ESYS,0
	*GET, _icurrentETyp, ELEM, _icurrentElem, ATTR, TYPE
	*GET, _planebehavior, ETYP, _icurrentETyp, ATTR, KOP3
	*IF, _planebehavior, EQ, 3, THEN
	    _planebehavior = 0
	*ENDIF
    ET,_icurrentETyp,223,1001,,_planebehavior
	*GET, _icurrentMat, ELEM, _icurrentElem, ATTR, MAT
	MPDELE,RSVX, _icurrentMat
	MPDELE,RSVY, _icurrentMat
	MPDELE,RSVZ, _icurrentMat
	TB,PIEZ,_icurrentMat,,,0

	TB,DPER,_icurrentMat,,,0

*ENDDO
*ENDIF

EMUNIT, EPZRO, 8.854E-12

/SOLU
ALLSEL,ALL
OUTRES,FGRAD,ALL

/com,***********  Piezoelectric Properties C234 ***********
CMBLOCK,Piezoelectric Body34,NODE,      979
(8i10)
     16987     16988     16989     16990     16991     16992     16993     16994
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
/PREP7
CMSEL,S,Piezoelectric Body34
ESLN,S,1
ESEL,R,ENAME,,185
*GET,iNum185,ELEM,0, COUNT
*IF, iNum185,GT,0,THEN
_icurrentElem = 0
*DO,ar30,1,iNum185,1
    _icurrentElem = ELNEXT(_icurrentElem)
    EMODIF,_icurrentElem,ESYS,0
	*GET, _icurrentETyp, ELEM, _icurrentElem, ATTR, TYPE
    ET,_icurrentETyp,226,1001
	*GET, _icurrentMat, ELEM, _icurrentElem, ATTR, MAT
	MPDELE,RSVX, _icurrentMat
	MPDELE,RSVY, _icurrentMat
	MPDELE,RSVZ, _icurrentMat
	TB,PIEZ,_icurrentMat,,,0
	TBDATA,  3, 2.8
	TBDATA,  6, 2.8
	TBDATA,  9, -14.7
	TBDATA, 14, -9.86
	TBDATA, 16, -9.86

	TB,DPER,_icurrentMat,,,0
	TBDATA, 1, 828.3, 828.3, 699.67

*ENDDO
*ENDIF

CMSEL,S,Piezoelectric Body34
ESLN,S,1
ESEL,R,ENAME,,186
*GET,iNum186,ELEM,0, COUNT
*IF, iNum186,GT,0,THEN
_icurrentElem = 0
*DO,ar30,1,iNum186,1
    _icurrentElem = ELNEXT(_icurrentElem)
    EMODIF,_icurrentElem,ESYS,0
	*GET, _icurrentETyp, ELEM, _icurrentElem, ATTR, TYPE
    ET,_icurrentETyp,226,1001
	*GET, _icurrentMat, ELEM, _icurrentElem, ATTR, MAT
	MPDELE,RSVX, _icurrentMat
	MPDELE,RSVY, _icurrentMat
	MPDELE,RSVZ, _icurrentMat
	TB,PIEZ,_icurrentMat,,,0
	TBDATA,  3, 2.8
	TBDATA,  6, 2.8
	TBDATA,  9, -14.7
	TBDATA, 14, -9.86
	TBDATA, 16, -9.86

	TB,DPER,_icurrentMat,,,0
	TBDATA, 1, 828.3, 828.3, 699.67

*ENDDO
*ENDIF

CMSEL,S,Piezoelectric Body34
ESLN,S,1
ESEL,R,ENAME,,187
*GET,iNum187,ELEM,0, COUNT
*IF, iNum187,GT,0,THEN
_icurrentElem = 0
*DO,ar30,1,iNum187,1
    _icurrentElem = ELNEXT(_icurrentElem)
    EMODIF,_icurrentElem,ESYS,0
	*GET, _icurrentETyp, ELEM, _icurrentElem, ATTR, TYPE
    ET,_icurrentETyp,227,1001
	*GET, _icurrentMat, ELEM, _icurrentElem, ATTR, MAT
	MPDELE,RSVX, _icurrentMat
	MPDELE,RSVY, _icurrentMat
	MPDELE,RSVZ, _icurrentMat
	TB,PIEZ,_icurrentMat,,,0
	TBDATA,  3, 2.8
	TBDATA,  6, 2.8
	TBDATA,  9, -14.7
	TBDATA, 14, -9.86
	TBDATA, 16, -9.86

	TB,DPER,_icurrentMat,,,0
	TBDATA, 1, 828.3, 828.3, 699.67

*ENDDO
*ENDIF

CMSEL,S,Piezoelectric Body34
ESLN,S,1
ESEL,R,ENAME,,182
*GET,iNum182,ELEM,0, COUNT
*IF, iNum182,GT,0,THEN
_icurrentElem = 0
*DO,ar30,1,iNum182,1
    _icurrentElem = ELNEXT(_icurrentElem)
    EMODIF,_icurrentElem,ESYS,0
	*GET, _icurrentETyp, ELEM, _icurrentElem, ATTR, TYPE
	*GET, _planebehavior, ETYP, _icurrentETyp, ATTR, KOP3
	*IF, _planebehavior, EQ, 3, THEN
	    _planebehavior = 0
	*ENDIF
    ET,_icurrentETyp,223,1001,,_planebehavior
	*GET, _icurrentMat, ELEM, _icurrentElem, ATTR, MAT
	MPDELE,RSVX, _icurrentMat
	MPDELE,RSVY, _icurrentMat
	MPDELE,RSVZ, _icurrentMat
	TB,PIEZ,_icurrentMat,,,0

	TB,DPER,_icurrentMat,,,0

*ENDDO
*ENDIF

CMSEL,S,Piezoelectric Body34
ESLN,S,1
ESEL,R,ENAME,,183
*GET,iNum183,ELEM,0, COUNT
*IF, iNum183,GT,0,THEN
_icurrentElem = 0
*DO,ar30,1,iNum183,1
    _icurrentElem = ELNEXT(_icurrentElem)
    EMODIF,_icurrentElem,ESYS,0
	*GET, _icurrentETyp, ELEM, _icurrentElem, ATTR, TYPE
	*GET, _planebehavior, ETYP, _icurrentETyp, ATTR, KOP3
	*IF, _planebehavior, EQ, 3, THEN
	    _planebehavior = 0
	*ENDIF
    ET,_icurrentETyp,223,1001,,_planebehavior
	*GET, _icurrentMat, ELEM, _icurrentElem, ATTR, MAT
	MPDELE,RSVX, _icurrentMat
	MPDELE,RSVY, _icurrentMat
	MPDELE,RSVZ, _icurrentMat
	TB,PIEZ,_icurrentMat,,,0

	TB,DPER,_icurrentMat,,,0

*ENDDO
*ENDIF

EMUNIT, EPZRO, 8.854E-12

/SOLU
ALLSEL,ALL
OUTRES,FGRAD,ALL

/com,***********  C2-V067 ***********
CMBLOCK,Voltage67,NODE,      417
(8i10)
     17409     17410     17414     17415     17419     17420     17424     17425
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
CMSEL,S,Voltage67
_isCP = 0
*GET, _isCP, NODE, _NUMMIN, CPS, VOLT
*IF, _isCP, EQ, 0, THEN
CP,NEXT,VOLT,ALL
*ENDIF
D,_NUMMIN,VOLT,0,0
ALLSEL,ALL

/com,***********  C1-V1127 ***********

CMSEL,S,PZT_CONNECTION
_isCP = 0
*GET, _isCP, NODE, _NUMMIN, CPS, VOLT
*IF, _isCP, EQ, 0, THEN
CP,NEXT,VOLT,ALL
*ENDIF
D,_NUMMIN,VOLT,1,0
ALLSEL,ALL

/com,***********  C1-V0167 ***********
CMBLOCK,Voltage167,NODE,      370
(8i10)
     16384     16385     16386     16387     16388     16389     16390     16391
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
CMSEL,S,Voltage167
_isCP = 0
*GET, _isCP, NODE, _NUMMIN, CPS, VOLT
*IF, _isCP, EQ, 0, THEN
CP,NEXT,VOLT,ALL
*ENDIF
D,_NUMMIN,VOLT,0,0
ALLSEL,ALL

! *********** WB SOLVE COMMAND ***********
! check interactive state
*get,ANSINTER_,active,,int
*if,ANSINTER_,ne,0,then
/eof
*endif
solve
/com *************** Write FE CONNECTORS *********
CEWRITE,file,ce,,INTE
save,file,db
fini
*get,_NSOLTHREADS,active,0,ntfs
*get,_NSOLPROCESSES,active,0,npfs
/post1
fini
