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/batch
! ANSYS input file written by Workbench version 2025 R2
! File used for geometry attach: C:\Users\stolf\dev\EsercitazioniSensori\esercitazione_b\esercizio_2\simulazioneTrasduttoreUltrasonicoConConcentratore_files\dp0\SYS-5\DM\SYS-5.agdb
/title,simulazioneTrasduttoreUltrasonicoConConcentratore--Modal (B5)
/COM,/COM,     LSDYNA, 2025.2
/COM,/COM,     ANSYSMotion, 2025.2
/com,--- Data in consistent MKS units. See Solving Units in the help system for more information.
/units,MKS
/prep7
! Turn off shape checking because checks already performed inside WB mesher.
! See help system for more information.
SHPP,OFF,,NOWARN
etcon,set             ! allow ANSYS to choose best KEYOP's for 180x elements, resets any applicable keyopt to MAPDL defaults
/com,*********** Send User Defined Coordinate System(s) ***********
csys,0
/com,*********** Nodes for the whole assembly ***********
nblock,3,,24006
(1i9,3e20.9e3)
        1    -1.241186875E-03     5.293521351E-03     7.559999824E-02
        2    -2.150410022E-03     3.824326663E-03     7.559999824E-02
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-1
/com,*********** Elements for Body 1 'M4' ***********
et,1,186
keyo,1,2,1          ! set full integration on SOLID186
MAT,1 $ TYPE,1 $ REAL,1 $ SECNUM,1 $ ESYS,0
eblock,11,COMPACT,,1632
(11i9)
        1     1946     1945     1967     1924     2028     2027     2049     2006     7454     7540
     7538     7535     7668     7743     7741     7739     7669     7667     7733     7617
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-1
secnum,1    ! reset the section ID to default
/com,*********** Elements for Body 2 'M3' ***********
et,2,186
keyo,2,2,1          ! set full integration on SOLID186
MAT,2 $ TYPE,2 $ REAL,2 $ SECNUM,2 $ ESYS,0
eblock,11,COMPACT,,3312
(11i9)
     1633    11186    11159    11175    11174    11330    11303    11319    11318    20990    21039
    20950    21059    21372    21419    21335    21437    21373    21296    21336    21334
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-1
secnum,1    ! reset the section ID to default
toffst,273.15,      ! Temperature offset from absolute zero
/com,*********** Set Reference Temperature ***********
tref,22.
/com,*********** Send Materials ***********
MP,DENS,1,4480,	! kg m^-3
MP,EX,1,166700000000,	! Pa
MP,NUXY,1,0.32,

MP,DENS,2,4480,	! kg m^-3
MP,EX,2,166700000000,	! Pa
MP,NUXY,2,0.32,

!************************* Model Summary ********************
!M4,	Titanio,	matid,	1
!M3,	Titanio,	matid,	2
!************************* End Model Summary ********************
/com,*********** Create Contact "Contact Region 2" ***********
*set,tid,4
*set,cid,3
r,tid
r,cid
et,tid,170
et,cid,174
MAT,4 $ TYPE,4 $ REAL,4 $ SECNUM,4 $ ESYS,0
eblock,11,COMPACT,,68
(11i9)
     6989     2042     2037     2034     2034     7719     7690     2034     7709
     6990     2050     2017     2016     2046     7742     7640     7724     7737
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-1
secnum,1    ! reset the section ID to default
MAT,3 $ TYPE,3 $ REAL,3 $ SECNUM,3 $ ESYS,0
eblock,11,COMPACT,,68
(11i9)
     7057     2042     2037     2034     2034     7719     7690     2034     7709
     7058     2050     2017     2016     2046     7742     7640     7724     7737
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-1
secnum,1    ! reset the section ID to default
MAT,3 $ TYPE,3 $ REAL,4 $ SECNUM,3 $ ESYS,0
eblock,11,COMPACT,,111
(11i9)
     7125     7972     8000     7868     7868    12041    11922     7868    11850
     7126     7990     7761     7763     7763    12035    11453     7763    11899
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-1
secnum,1    ! reset the section ID to default
MAT,4 $ TYPE,4 $ REAL,3 $ SECNUM,4 $ ESYS,0
eblock,11,COMPACT,,111
(11i9)
     7236     7972     8000     7868     7868    12041    11922     7868    11850
     7237     7990     7761     7763     7763    12035    11453     7763    11899
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-1
secnum,1    ! reset the section ID to default
keyo,cid,8,2               ! auto create asymmetric contact (from Program Controlled setting)
keyo,cid,10,0              ! adjust contact stiffness each NR iteration (from Program Controlled setting)
keyo,cid,12,5              ! bonded always
keyo,cid,18,1              ! small sliding turned on by application
keyo,cid,2,2               ! MPC for bonded contacts (from Program Controlled setting)
keyo,tid,5,0               ! Automatic constraint type detection
keyo,cid,4,2               ! on nodal point - normal to target surface (from Program Controlled setting)
keyo,cid,9,1               ! ignore initial gaps/penetration
keyo,cid,7,0               ! No Prediction
rmod,tid,3,10.      ! FKN
rmod,tid,5,0.       ! ICONT
rmod,tid,6,0.       ! PINB
rmod,tid,10,0.      ! CNOF
rmod,tid,12,0.      ! FKT
rmod,tid,36,59      ! WB DSID
rmod,cid,3,10.      ! FKN
rmod,cid,5,0.       ! ICONT
rmod,cid,6,0.       ! PINB
rmod,cid,10,0.      ! CNOF
rmod,cid,12,0.      ! FKT
rmod,cid,36,59      ! WB DSID
nsel,all
esel,all
fini
/solu
antype,2                   ! modal analysis
_thickRatio=  1     ! Ratio of thick parts in the model
thexpand,off     ! ignore thermal strains
modopt,lanb,all,36000.,44000.
outres,erase
outres,all,none
outres,nsol,all
outres,eangl,all,
outres,veng,all,
outres,strs,all,
outres,epel,all,
outres,eppl,all,
outres,rsol,all
outres,nload,all,
outres,cont,all,
mxpand,,,,yes,,no             ! expand requested element results, but not write them to file.mode
dmpopt,esav,no
dmpopt,emat,no
dmpopt,full,no
! *********** WB SOLVE COMMAND ***********
! check interactive state
*get,ANSINTER_,active,,int
*if,ANSINTER_,ne,0,then
/eof
*endif
solve
/com *************** Write FE CONNECTORS *********
CEWRITE,file,ce,,INTE
*get,_nmodalsolproc,active,0,numcpu
fini
save,file,db
*get,_NSOLTHREADS,active,0,ntfs
*get,_NSOLPROCESSES,active,0,npfs
/post1
*dim,_direction,CHAR,6,1
_direction(1) = 'X'
_direction(2) = 'Y'
_direction(3) = 'Z'
_direction(4) = 'ROTX'
_direction(5) = 'ROTY'
_direction(6) = 'ROTZ'
*get,_lastLS,active,0,set,LSTP
*get,_beginset,active,0,set,nset,first,_lastLS
*get,_endset,active,0,set,nset,last,_lastLS
_nummodes = 0
*if,_endset,gt,0,then
_nummodes = _endset - _beginset + 1
*endif
*do,i_mode,1,_nummodes
   *do,j_component,1,6
			*get,PFACT_%i_mode%_%j_component%,MODE,%i_mode%,PFACT,,DIREC,_direction(%j_component%)
   *enddo
*enddo
*dim,_tmdirection,CHAR,6,1
_tmdirection(1) = 'X'
_tmdirection(2) = 'Y'
_tmdirection(3) = 'Z'
_tmdirection(4) = 'X'
_tmdirection(5) = 'Y'
_tmdirection(6) = 'Z'
*do,j_component,1,6
    *if,j_component,gt,3,then
        *get,TOTALMASS_%j_component%,ELEM,0,IOR,_tmdirection(%j_component%)
    *else
        *get,TOTALMASS_%j_component%,ELEM,0,MTOT,_tmdirection(%j_component%)
    *endif
*enddo
fini
